*Heading
** Job name: ISIGHT_STATIC_LINEAR Model name: Wing 5 New Materials
** Generated by: Abaqus/CAE 2023
*Preprint, echo=NO, model=NO, history=NO, contact=NO
**
** PARTS
**
*Part, name=wing#5_stiffeners
*Node
      1,   515.020508,  -16.6933765,       -3810.
      2,   535.174072,  -15.1842384,       -3810.
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*Element, type=S4R
1, 4, 3, 2, 1
2, 8, 7, 6, 5
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*Element, type=S3
963, 6712, 1932, 1933
964, 6713, 6732, 6714
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*Nset, nset="MIDDLE SKIN"
     3,     4,     7,     8,    10,    12
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*Elset, elset="MIDDLE SKIN"
  3515,  3516,  3517,  3518,  3519,  3520
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*Nset, nset="LEADING EDGE"
   464,   465,   466,   575,   576,   577
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*Elset, elset="LEADING EDGE"
  3645,  3646,  3647,  3648,  3649,  3650
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*Nset, nset=CAPS
   465,   466,   476,   477,   479,   480
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*Elset, elset=CAPS
  3529,  3530,  3531,  3532,  3557,  3558
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*Nset, nset="TRAILING EDGE"
   491,   492,   493,   500,   501,   502
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*Elset, elset="TRAILING EDGE"
  1797,  1798,  1799,  1800,  1801,  1802
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*Nset, nset=WEBS
  476,  477,  481,  482,  483,  484
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*Elset, elset=WEBS
 1099, 1100, 1101, 1102, 1103, 1104
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*Nset, nset="STRINGER S"
    1,    4,    6,    7,   14,   15
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*Elset, elset="STRINGER S"
  521,  522,  523,  524,  525,  526
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*Orientation, name=Ori-18
          1.,           0.,           0.,           0.,           1.,           0.
3, 0.
** Region: (R-1: Generated From Layup)
*Elset, elset=R-1
     1,     2,     3,     4,     5,     6
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** Section: R-1
*Shell Section, elset=R-1, composite, orientation=Ori-18, layup=R
0.125, 3, T800S-24K-UD, 45., Ply-1
0.125, 3, T800S-24K-UD, -45., Ply-2
5., 3, ECA-R_4p8-29, 0., Ply-3
0.125, 3, T800S-24K-UD, -45., Ply-4
0.125, 3, T800S-24K-UD, 45., Ply-5
*Orientation, name=Ori-44
          0.,           0.,          -1.,           0.,           1.,           0.
3, 0.
** Region: (SSW-1: Generated From Layup)
*Elset, elset=SSW-1
  521,  522,  523,  524,  525,  526
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** Section: SSW-1
*Shell Section, elset=SSW-1, composite, orientation=Ori-44, layup=SSW
0.125, 3, T800S-24K-UD, 45., Ply-1-Copy2
0.125, 3, T800S-24K-UD, -45., Ply-2-Copy2
0.125, 3, T800S-24K-UD, 45., Ply-1-Copy1
0.125, 3, T800S-24K-UD, -45., Ply-2-Copy1
0.125, 3, T800S-24K-UD, -45., Ply-3-Copy1
0.125, 3, T800S-24K-UD, 45., Ply-4-Copy1
0.125, 3, T800S-24K-UD, -45., Ply-3
0.125, 3, T800S-24K-UD, 45., Ply-4
*Orientation, name=Ori-51
          0.,           0.,          -1.,           0.,           1.,           0.
3, 0.
** Region: (W-1: Generated From Layup)
*Elset, elset=W-1
 1099, 1100, 1101, 1102, 1103, 1104
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** Section: W-1
*Shell Section, elset=W-1, composite, orientation=Ori-51, layup=W
0.125, 3, T800S-24K-UD, 45., Ply-1
0.125, 3, T800S-24K-UD, -45., Ply-2
0.125, 3, T800S-24K-UD, 0., Ply-3
0.125, 3, T800S-24K-UD, 90., Ply-4
5., 3, ECA-R_4p8-29, 0., Ply-4-Copy1-Copy1
0.125, 3, T800S-24K-UD, 90., Ply-4-Copy1
0.125, 3, T800S-24K-UD, 0., Ply-3-Copy1
0.125, 3, T800S-24K-UD, -45., Ply-2-Copy1
0.125, 3, T800S-24K-UD, 45., Ply-1-Copy1
*Orientation, name=Ori-47
          0.,           0.,          -1.,          -1.,           0.,           0.
3, 0.
** Region: (TE1R-1: Generated From Layup)
*Elset, elset=TE1R-1
 1797, 1798, 1799, 1800, 1801, 1802
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** Section: TE1R-1
*Shell Section, elset=TE1R-1, composite, orientation=Ori-47, layup=TE1R
0.125, 3, T800S-24K-UD, 45., Ply-1
0.125, 3, T800S-24K-UD, -45., Ply-2
0.125, 3, T800S-24K-UD, 0., Ply-3
0.125, 3, T800S-24K-UD, 90., Ply-4
0.125, 3, T800S-24K-UD, 90., Ply-4-Copy1
0.125, 3, T800S-24K-UD, 0., Ply-3-Copy1
0.125, 3, T800S-24K-UD, -45., Ply-2-Copy1
0.125, 3, T800S-24K-UD, 45., Ply-1-Copy1
*Orientation, name=Ori-45
          0.,           0.,          -1.,           0.,           1.,           0.
3, 0.
** Region: (STE-1: Generated From Layup)
*Elset, elset=STE-1
  1931,  1932,  1933,  1934,  1935,  1936
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** Section: STE-1
*Shell Section, elset=STE-1, composite, orientation=Ori-45, layup=STE
0.125, 3, T800S-24K-UD, 45., Ply-1
0.125, 3, T800S-24K-UD, -45., Ply-2
0.125, 3, T800S-24K-UD, -45., Ply-3
0.125, 3, T800S-24K-UD, 45., Ply-4
*Orientation, name=Ori-20
          0.,           0.,          -1.,          -1.,           0.,           0.
3, 0.
** Region: (S1R-1: Generated From Layup)
*Elset, elset=S1R-1
 3515, 3516, 3517, 3518, 3519, 3520
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** Section: S1R-1
*Shell Section, elset=S1R-1, composite, orientation=Ori-20, layup=S1R
0.125, 3, T800S-24K-UD, 45., Ply-1
0.125, 3, T800S-24K-UD, -45., Ply-2
0.125, 3, T800S-24K-UD, 0., Ply-3
0.125, 3, T800S-24K-UD, 90., Ply-4
0.125, 3, T800S-24K-UD, 90., Ply-4-Copy1
0.125, 3, T800S-24K-UD, 0., Ply-3-Copy1
0.125, 3, T800S-24K-UD, -45., Ply-2-Copy1
0.125, 3, T800S-24K-UD, 45., Ply-1-Copy1
*Orientation, name=Ori-2
          0.,           0.,          -1.,          -1.,           0.,           0.
3, 0.
** Region: (C1R-1: Generated From Layup)
*Elset, elset=C1R-1
 3529, 3530, 3531, 3532, 3557, 3558, 3559, 3560, 3611, 3612, 3613, 3614
** Section: C1R-1
*Shell Section, elset=C1R-1, composite, orientation=Ori-2, layup=C1R
0.375, 3, T800S-24K-UD, 45., Ply-1
0.375, 3, T800S-24K-UD, -45., Ply-2
1.875, 3, T800S-24K-UD, 0., Ply-3
0.25, 3, T800S-24K-UD, 90., Ply-4
0.25, 3, T800S-24K-UD, 90., Ply-4-Copy1
1.875, 3, T800S-24K-UD, 0., Ply-3-Copy1
0.375, 3, T800S-24K-UD, -45., Ply-2-Copy1
0.375, 3, T800S-24K-UD, 45., Ply-1-Copy1
0.125, 3, T800S-24K-UD, 45., Ply-1-Copy2
0.125, 3, T800S-24K-UD, -45., Ply-2-Copy2
0.125, 3, T800S-24K-UD, 0., Ply-3-Copy2
0.125, 3, T800S-24K-UD, 90., Ply-4-Copy2
0.125, 3, T800S-24K-UD, 90., Ply-4-Copy1-Copy1
0.125, 3, T800S-24K-UD, 0., Ply-3-Copy1-Copy1
0.125, 3, T800S-24K-UD, -45., Ply-2-Copy1-Copy1
0.125, 3, T800S-24K-UD, 45., Ply-1-Copy1-Copy1
*Orientation, name=Ori-4
          0.,           0.,          -1.,          -1.,           0.,           0.
3, 0.
** Region: (C2R-1: Generated From Layup)
*Elset, elset=C2R-1
 3575, 3576, 3577, 3578, 3603, 3604, 3605, 3606, 3607, 3608, 3609, 3610
** Section: C2R-1
*Shell Section, elset=C2R-1, composite, orientation=Ori-4, layup=C2R
0.25, 3, T800S-24K-UD, 45., Ply-1
0.25, 3, T800S-24K-UD, -45., Ply-2
1.875, 3, T800S-24K-UD, 0., Ply-3
0.125, 3, T800S-24K-UD, 90., Ply-4
0.125, 3, T800S-24K-UD, 90., Ply-4-Copy1
1.875, 3, T800S-24K-UD, 0., Ply-3-Copy1
0.25, 3, T800S-24K-UD, -45., Ply-2-Copy1
0.25, 3, T800S-24K-UD, 45., Ply-1-Copy1
0.125, 3, T800S-24K-UD, 45., Ply-1-Copy2
0.125, 3, T800S-24K-UD, -45., Ply-2-Copy2
0.125, 3, T800S-24K-UD, 0., Ply-3-Copy2
0.125, 3, T800S-24K-UD, 90., Ply-4-Copy2
0.125, 3, T800S-24K-UD, 90., Ply-4-Copy1-Copy1
0.125, 3, T800S-24K-UD, 0., Ply-3-Copy1-Copy1
0.125, 3, T800S-24K-UD, -45., Ply-2-Copy1-Copy1
0.125, 3, T800S-24K-UD, 45., Ply-1-Copy1-Copy1
*Orientation, name=Ori-6
          0.,           0.,          -1.,          -1.,           0.,           0.
3, 0.
** Region: (LE1R-1: Generated From Layup)
*Elset, elset=LE1R-1, generate
 3645,  3694,     1
** Section: LE1R-1
*Shell Section, elset=LE1R-1, composite, orientation=Ori-6, layup=LE1R
0.125, 3, T800S-24K-UD, 45., Ply-1
0.125, 3, T800S-24K-UD, -45., Ply-2
0.125, 3, T800S-24K-UD, 0., Ply-3
0.125, 3, T800S-24K-UD, 90., Ply-4
0.125, 3, T800S-24K-UD, 90., Ply-4-Copy1
0.125, 3, T800S-24K-UD, 0., Ply-3-Copy1
0.125, 3, T800S-24K-UD, -45., Ply-2-Copy1
0.125, 3, T800S-24K-UD, 45., Ply-1-Copy1
*Orientation, name=Ori-46
          0.,           0.,          -1.,          -1.,           0.,           0.
3, 0.
** Region: (TE1-1: Generated From Layup)
*Elset, elset=TE1-1
  3705,  3706,  3707,  3708,  3709,  3710
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** Section: TE1-1
*Shell Section, elset=TE1-1, composite, orientation=Ori-46, layup=TE1
0.125, 3, T800S-24K-UD, 45., Ply-1
0.125, 3, T800S-24K-UD, -45., Ply-2
0.125, 3, T800S-24K-UD, 0., Ply-3
0.125, 3, T800S-24K-UD, 90., Ply-4
0.125, 3, T800S-24K-UD, 90., Ply-4-Copy1
0.125, 3, T800S-24K-UD, 0., Ply-3-Copy1
0.125, 3, T800S-24K-UD, -45., Ply-2-Copy1
0.125, 3, T800S-24K-UD, 45., Ply-1-Copy1
*Orientation, name=Ori-21
          0.,           0.,          -1.,          -1.,           0.,           0.
3, 0.
** Region: (S1S-1: Generated From Layup)
*Elset, elset=S1S-1
 3857, 3858, 3859, 3860, 3861, 3862
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** Section: S1S-1
*Shell Section, elset=S1S-1, composite, orientation=Ori-21, layup=S1S
0.125, 3, T800S-24K-UD, 45., Ply-1-Copy2
0.125, 3, T800S-24K-UD, -45., Ply-2-Copy2
0.125, 3, T800S-24K-UD, 45., Ply-1-Copy2-Copy1
0.125, 3, T800S-24K-UD, -45., Ply-2-Copy2-Copy1
0.125, 3, T800S-24K-UD, 45., Ply-1
0.125, 3, T800S-24K-UD, -45., Ply-2
0.125, 3, T800S-24K-UD, 0., Ply-3
0.125, 3, T800S-24K-UD, 90., Ply-4
0.125, 3, T800S-24K-UD, 90., Ply-4-Copy1
0.125, 3, T800S-24K-UD, 0., Ply-3-Copy1
0.125, 3, T800S-24K-UD, -45., Ply-2-Copy1
0.125, 3, T800S-24K-UD, 45., Ply-1-Copy1
*Orientation, name=Ori-19
          0.,           0.,          -1.,          -1.,           0.,           0.
3, 0.
** Region: (S1-1: Generated From Layup)
*Elset, elset=S1-1
 3889, 3890, 3891, 3892, 3893, 3894
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** Section: S1-1
*Shell Section, elset=S1-1, composite, orientation=Ori-19, layup=S1
0.125, 3, T800S-24K-UD, 45., Ply-1
0.125, 3, T800S-24K-UD, -45., Ply-2
0.125, 3, T800S-24K-UD, 0., Ply-3
0.125, 3, T800S-24K-UD, 90., Ply-4
0.125, 3, T800S-24K-UD, 90., Ply-4-Copy1
0.125, 3, T800S-24K-UD, 0., Ply-3-Copy1
0.125, 3, T800S-24K-UD, -45., Ply-2-Copy1
0.125, 3, T800S-24K-UD, 45., Ply-1-Copy1
*Orientation, name=Ori-5
          0.,           0.,          -1.,          -1.,           0.,           0.
3, 0.
** Region: (LE1-1: Generated From Layup)
*Elset, elset=LE1-1
 4089, 4090, 4091, 4092, 4093, 4094
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** Section: LE1-1
*Shell Section, elset=LE1-1, composite, orientation=Ori-5, layup=LE1
0.125, 3, T800S-24K-UD, 45., Ply-1
0.125, 3, T800S-24K-UD, -45., Ply-2
0.125, 3, T800S-24K-UD, 0., Ply-3
0.125, 3, T800S-24K-UD, 90., Ply-4
0.125, 3, T800S-24K-UD, 90., Ply-4-Copy1
0.125, 3, T800S-24K-UD, 0., Ply-3-Copy1
0.125, 3, T800S-24K-UD, -45., Ply-2-Copy1
0.125, 3, T800S-24K-UD, 45., Ply-1-Copy1
*Orientation, name=Ori-1
          0.,           0.,          -1.,          -1.,           0.,           0.
3, 0.
** Region: (C1-1: Generated From Layup)
*Elset, elset=C1-1
  4193,  4194,  4195,  4196,  4197,  4198
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** Section: C1-1
*Shell Section, elset=C1-1, composite, orientation=Ori-1, layup=C1
0.375, 3, T800S-24K-UD, 45., Ply-1
0.375, 3, T800S-24K-UD, -45., Ply-2
1.875, 3, T800S-24K-UD, 0., Ply-3
0.25, 3, T800S-24K-UD, 90., Ply-4
0.25, 3, T800S-24K-UD, 90., Ply-4-Copy1
1.875, 3, T800S-24K-UD, 0., Ply-3-Copy1
0.375, 3, T800S-24K-UD, -45., Ply-2-Copy1
0.375, 3, T800S-24K-UD, 45., Ply-1-Copy1
0.125, 3, T800S-24K-UD, 45., Ply-1-Copy2
0.125, 3, T800S-24K-UD, -45., Ply-2-Copy2
0.125, 3, T800S-24K-UD, 0., Ply-3-Copy2
0.125, 3, T800S-24K-UD, 90., Ply-4-Copy2
0.125, 3, T800S-24K-UD, 90., Ply-4-Copy1-Copy1
0.125, 3, T800S-24K-UD, 0., Ply-3-Copy1-Copy1
0.125, 3, T800S-24K-UD, -45., Ply-2-Copy1-Copy1
0.125, 3, T800S-24K-UD, 45., Ply-1-Copy1-Copy1
*Orientation, name=Ori-3
          0.,           0.,          -1.,          -1.,           0.,           0.
3, 0.
** Region: (C2-1: Generated From Layup)
*Elset, elset=C2-1
  4305,  4306,  4307,  4308,  4309,  4310
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** Section: C2-1
*Shell Section, elset=C2-1, composite, orientation=Ori-3, layup=C2
0.25, 3, T800S-24K-UD, 45., Ply-1
0.25, 3, T800S-24K-UD, -45., Ply-2
1.875, 3, T800S-24K-UD, 0., Ply-3
0.125, 3, T800S-24K-UD, 90., Ply-4
0.125, 3, T800S-24K-UD, 90., Ply-4-Copy1
1.875, 3, T800S-24K-UD, 0., Ply-3-Copy1
0.25, 3, T800S-24K-UD, -45., Ply-2-Copy1
0.25, 3, T800S-24K-UD, 45., Ply-1-Copy1
0.125, 3, T800S-24K-UD, 45., Ply-1-Copy2
0.125, 3, T800S-24K-UD, -45., Ply-2-Copy2
0.125, 3, T800S-24K-UD, 0., Ply-3-Copy2
0.125, 3, T800S-24K-UD, 90., Ply-4-Copy2
0.125, 3, T800S-24K-UD, 90., Ply-4-Copy1-Copy1
0.125, 3, T800S-24K-UD, 0., Ply-3-Copy1-Copy1
0.125, 3, T800S-24K-UD, -45., Ply-2-Copy1-Copy1
0.125, 3, T800S-24K-UD, 45., Ply-1-Copy1-Copy1
*Orientation, name=Ori-52
          0.,           0.,          -1.,           0.,           1.,           0.
3, 0.
** Region: (WR-1: Generated From Layup)
*Elset, elset=WR-1
 4433, 4434, 4435, 4436, 4437, 4438, 4568, 4569, 4570, 4571, 4572, 4573
** Section: WR-1
*Shell Section, elset=WR-1, composite, orientation=Ori-52, layup=WR
0.125, 3, T800S-24K-UD, 45., Ply-1
0.125, 3, T800S-24K-UD, -45., Ply-2
0.125, 3, T800S-24K-UD, 0., Ply-3
0.125, 3, T800S-24K-UD, 90., Ply-4
5., 3, ECA-R_4p8-29, 0., Ply-4-Copy1-Copy1
0.125, 3, T800S-24K-UD, 90., Ply-4-Copy1
0.125, 3, T800S-24K-UD, 0., Ply-3-Copy1
0.125, 3, T800S-24K-UD, -45., Ply-2-Copy1
0.125, 3, T800S-24K-UD, 45., Ply-1-Copy1
*Orientation, name=Ori-48
          0.,           0.,          -1.,          -1.,           0.,           0.
3, 0.
** Region: (TE2-1: Generated From Layup)
*Elset, elset=TE2-1
  5243,  5244,  5245,  5246,  5247,  5248
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** Section: TE2-1
*Shell Section, elset=TE2-1, composite, orientation=Ori-48, layup=TE2
0.125, 3, T800S-24K-UD, 45., Ply-1
0.125, 3, T800S-24K-UD, -45., Ply-2
0.125, 3, T800S-24K-UD, 0., Ply-3
0.125, 3, T800S-24K-UD, 90., Ply-4
0.125, 3, T800S-24K-UD, 90., Ply-4-Copy1
0.125, 3, T800S-24K-UD, 0., Ply-3-Copy1
0.125, 3, T800S-24K-UD, -45., Ply-2-Copy1
0.125, 3, T800S-24K-UD, 45., Ply-1-Copy1
*Orientation, name=Ori-49
          0.,           0.,          -1.,          -1.,           0.,           0.
3, 0.
** Region: (TE3-1: Generated From Layup)
*Elset, elset=TE3-1
  5347,  5348,  5349,  5350,  5351,  5352
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** Section: TE3-1
*Shell Section, elset=TE3-1, composite, orientation=Ori-49, layup=TE3
0.125, 3, T800S-24K-UD, 45., Ply-1
0.125, 3, T800S-24K-UD, -45., Ply-2
0.125, 3, T800S-24K-UD, 0., Ply-3
0.125, 3, T800S-24K-UD, 90., Ply-4
0.125, 3, T800S-24K-UD, 90., Ply-4-Copy1
0.125, 3, T800S-24K-UD, 0., Ply-3-Copy1
0.125, 3, T800S-24K-UD, -45., Ply-2-Copy1
0.125, 3, T800S-24K-UD, 45., Ply-1-Copy1
*Orientation, name=Ori-50
          0.,           0.,          -1.,          -1.,           0.,           0.
3, 0.
** Region: (TE4-1: Generated From Layup)
*Elset, elset=TE4-1
  5451,  5452,  5453,  5454,  5455,  5456
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** Section: TE4-1
*Shell Section, elset=TE4-1, composite, orientation=Ori-50, layup=TE4
0.125, 3, T800S-24K-UD, 45., Ply-1
0.125, 3, T800S-24K-UD, -45., Ply-2
0.125, 3, T800S-24K-UD, 0., Ply-3
0.125, 3, T800S-24K-UD, 90., Ply-4
0.125, 3, T800S-24K-UD, 90., Ply-4-Copy1
0.125, 3, T800S-24K-UD, 0., Ply-3-Copy1
0.125, 3, T800S-24K-UD, -45., Ply-2-Copy1
0.125, 3, T800S-24K-UD, 45., Ply-1-Copy1
*Orientation, name=Ori-36
          0.,           0.,          -1.,          -1.,           0.,           0.
3, 0.
** Region: (S9-1: Generated From Layup)
*Elset, elset=S9-1
  5843,  5844,  5845,  5846,  5847,  5848
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** Section: S9-1
*Shell Section, elset=S9-1, composite, orientation=Ori-36, layup=S9
0.125, 3, T800S-24K-UD, 45., Ply-1
0.125, 3, T800S-24K-UD, -45., Ply-2
0.125, 3, T800S-24K-UD, 0., Ply-3
0.125, 3, T800S-24K-UD, 90., Ply-4
0.125, 3, T800S-24K-UD, 90., Ply-4-Copy1
0.125, 3, T800S-24K-UD, 0., Ply-3-Copy1
0.125, 3, T800S-24K-UD, -45., Ply-2-Copy1
0.125, 3, T800S-24K-UD, 45., Ply-1-Copy1
*Orientation, name=Ori-38
          0.,           0.,          -1.,          -1.,           0.,           0.
3, 0.
** Region: (S10-1: Generated From Layup)
*Elset, elset=S10-1
  5963,  5964,  5965,  5966,  5967,  5968
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** Section: S10-1
*Shell Section, elset=S10-1, composite, orientation=Ori-38, layup=S10
0.125, 3, T800S-24K-UD, 45., Ply-1
0.125, 3, T800S-24K-UD, -45., Ply-2
0.125, 3, T800S-24K-UD, 0., Ply-3
0.125, 3, T800S-24K-UD, 90., Ply-4
0.125, 3, T800S-24K-UD, 90., Ply-4-Copy1
0.125, 3, T800S-24K-UD, 0., Ply-3-Copy1
0.125, 3, T800S-24K-UD, -45., Ply-2-Copy1
0.125, 3, T800S-24K-UD, 45., Ply-1-Copy1
*Orientation, name=Ori-40
          0.,           0.,          -1.,          -1.,           0.,           0.
3, 0.
** Region: (S11-1: Generated From Layup)
*Elset, elset=S11-1
  6083,  6084,  6085,  6086,  6087,  6088
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** Section: S11-1
*Shell Section, elset=S11-1, composite, orientation=Ori-40, layup=S11
0.125, 3, T800S-24K-UD, 45., Ply-1
0.125, 3, T800S-24K-UD, -45., Ply-2
0.125, 3, T800S-24K-UD, 0., Ply-3
0.125, 3, T800S-24K-UD, 90., Ply-4
0.125, 3, T800S-24K-UD, 90., Ply-4-Copy1
0.125, 3, T800S-24K-UD, 0., Ply-3-Copy1
0.125, 3, T800S-24K-UD, -45., Ply-2-Copy1
0.125, 3, T800S-24K-UD, 45., Ply-1-Copy1
*Orientation, name=Ori-42
          0.,           0.,          -1.,          -1.,           0.,           0.
3, 0.
** Region: (S12-1: Generated From Layup)
*Elset, elset=S12-1
  6203,  6204,  6205,  6206,  6207,  6208
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** Section: S12-1
*Shell Section, elset=S12-1, composite, orientation=Ori-42, layup=S12
0.125, 3, T800S-24K-UD, 45., Ply-1
0.125, 3, T800S-24K-UD, -45., Ply-2
0.125, 3, T800S-24K-UD, 0., Ply-3
0.125, 3, T800S-24K-UD, 90., Ply-4
0.125, 3, T800S-24K-UD, 90., Ply-4-Copy1
0.125, 3, T800S-24K-UD, 0., Ply-3-Copy1
0.125, 3, T800S-24K-UD, -45., Ply-2-Copy1
0.125, 3, T800S-24K-UD, 45., Ply-1-Copy1
*Orientation, name=Ori-37
          0.,           0.,          -1.,          -1.,           0.,           0.
3, 0.
** Region: (S9S-1: Generated From Layup)
*Elset, elset=S9S-1
 6783, 6784, 6785, 6786, 6787, 6788
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** Section: S9S-1
*Shell Section, elset=S9S-1, composite, orientation=Ori-37, layup=S9S
0.125, 3, T800S-24K-UD, 45., Ply-1-Copy2
0.125, 3, T800S-24K-UD, -45., Ply-2-Copy2
0.125, 3, T800S-24K-UD, 45., Ply-1-Copy2-Copy1
0.125, 3, T800S-24K-UD, -45., Ply-2-Copy2-Copy1
0.125, 3, T800S-24K-UD, 45., Ply-1
0.125, 3, T800S-24K-UD, -45., Ply-2
0.125, 3, T800S-24K-UD, 0., Ply-3
0.125, 3, T800S-24K-UD, 90., Ply-4
0.125, 3, T800S-24K-UD, 90., Ply-4-Copy1
0.125, 3, T800S-24K-UD, 0., Ply-3-Copy1
0.125, 3, T800S-24K-UD, -45., Ply-2-Copy1
0.125, 3, T800S-24K-UD, 45., Ply-1-Copy1
*Orientation, name=Ori-39
          0.,           0.,          -1.,          -1.,           0.,           0.
3, 0.
** Region: (S10S-1: Generated From Layup)
*Elset, elset=S10S-1
 6867, 6868, 6869, 6870, 6871, 6872
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** Section: S10S-1
*Shell Section, elset=S10S-1, composite, orientation=Ori-39, layup=S10S
0.125, 3, T800S-24K-UD, 45., Ply-1-Copy2
0.125, 3, T800S-24K-UD, -45., Ply-2-Copy2
0.125, 3, T800S-24K-UD, 45., Ply-1-Copy2-Copy1
0.125, 3, T800S-24K-UD, -45., Ply-2-Copy2-Copy1
0.125, 3, T800S-24K-UD, 45., Ply-1
0.125, 3, T800S-24K-UD, -45., Ply-2
0.125, 3, T800S-24K-UD, 0., Ply-3
0.125, 3, T800S-24K-UD, 90., Ply-4
0.125, 3, T800S-24K-UD, 90., Ply-4-Copy1
0.125, 3, T800S-24K-UD, 0., Ply-3-Copy1
0.125, 3, T800S-24K-UD, -45., Ply-2-Copy1
0.125, 3, T800S-24K-UD, 45., Ply-1-Copy1
*Orientation, name=Ori-41
          0.,           0.,          -1.,          -1.,           0.,           0.
3, 0.
** Region: (S11S-1: Generated From Layup)
*Elset, elset=S11S-1
 6951, 6952, 6953, 6954, 6955, 6956
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** Section: S11S-1
*Shell Section, elset=S11S-1, composite, orientation=Ori-41, layup=S11S
0.125, 3, T800S-24K-UD, 45., Ply-1-Copy2
0.125, 3, T800S-24K-UD, -45., Ply-2-Copy2
0.125, 3, T800S-24K-UD, 45., Ply-1-Copy2-Copy1
0.125, 3, T800S-24K-UD, -45., Ply-2-Copy2-Copy1
0.125, 3, T800S-24K-UD, 45., Ply-1
0.125, 3, T800S-24K-UD, -45., Ply-2
0.125, 3, T800S-24K-UD, 0., Ply-3
0.125, 3, T800S-24K-UD, 90., Ply-4
0.125, 3, T800S-24K-UD, 90., Ply-4-Copy1
0.125, 3, T800S-24K-UD, 0., Ply-3-Copy1
0.125, 3, T800S-24K-UD, -45., Ply-2-Copy1
0.125, 3, T800S-24K-UD, 45., Ply-1-Copy1
*Orientation, name=Ori-43
          0.,           0.,          -1.,          -1.,           0.,           0.
3, 0.
** Region: (S12S-1: Generated From Layup)
*Elset, elset=S12S-1
 7035, 7036, 7037, 7038, 7039, 7040
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** Section: S12S-1
*Shell Section, elset=S12S-1, composite, orientation=Ori-43, layup=S12S
0.125, 3, T800S-24K-UD, 45., Ply-1-Copy2
0.125, 3, T800S-24K-UD, -45., Ply-2-Copy2
0.125, 3, T800S-24K-UD, 45., Ply-1-Copy2-Copy1
0.125, 3, T800S-24K-UD, -45., Ply-2-Copy2-Copy1
0.125, 3, T800S-24K-UD, 45., Ply-1
0.125, 3, T800S-24K-UD, -45., Ply-2
0.125, 3, T800S-24K-UD, 0., Ply-3
0.125, 3, T800S-24K-UD, 90., Ply-4
0.125, 3, T800S-24K-UD, 90., Ply-4-Copy1
0.125, 3, T800S-24K-UD, 0., Ply-3-Copy1
0.125, 3, T800S-24K-UD, -45., Ply-2-Copy1
0.125, 3, T800S-24K-UD, 45., Ply-1-Copy1
*Orientation, name=Ori-31
          0.,           0.,          -1.,          -1.,           0.,           0.
3, 0.
** Region: (S6S-1: Generated From Layup)
*Elset, elset=S6S-1
 7441, 7442, 7443, 7444, 7445, 7446
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** Section: S6S-1
*Shell Section, elset=S6S-1, composite, orientation=Ori-31, layup=S6S
0.125, 3, T800S-24K-UD, 45., Ply-1-Copy2
0.125, 3, T800S-24K-UD, -45., Ply-2-Copy2
0.125, 3, T800S-24K-UD, 45., Ply-1-Copy2-Copy1
0.125, 3, T800S-24K-UD, -45., Ply-2-Copy2-Copy1
0.125, 3, T800S-24K-UD, 45., Ply-1
0.125, 3, T800S-24K-UD, -45., Ply-2
0.125, 3, T800S-24K-UD, 0., Ply-3
0.125, 3, T800S-24K-UD, 90., Ply-4
0.125, 3, T800S-24K-UD, 90., Ply-4-Copy1
0.125, 3, T800S-24K-UD, 0., Ply-3-Copy1
0.125, 3, T800S-24K-UD, -45., Ply-2-Copy1
0.125, 3, T800S-24K-UD, 45., Ply-1-Copy1
*Orientation, name=Ori-30
          0.,           0.,          -1.,          -1.,           0.,           0.
3, 0.
** Region: (S6-1: Generated From Layup)
*Elset, elset=S6-1
  7506,  7507,  7508,  7509,  7510,  7511
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** Section: S6-1
*Shell Section, elset=S6-1, composite, orientation=Ori-30, layup=S6
0.125, 3, T800S-24K-UD, 45., Ply-1
0.125, 3, T800S-24K-UD, -45., Ply-2
0.125, 3, T800S-24K-UD, 0., Ply-3
0.125, 3, T800S-24K-UD, 90., Ply-4
0.125, 3, T800S-24K-UD, 90., Ply-4-Copy1
0.125, 3, T800S-24K-UD, 0., Ply-3-Copy1
0.125, 3, T800S-24K-UD, -45., Ply-2-Copy1
0.125, 3, T800S-24K-UD, 45., Ply-1-Copy1
*Orientation, name=Ori-29
          0.,           0.,          -1.,          -1.,           0.,           0.
3, 0.
** Region: (S5S-1: Generated From Layup)
*Elset, elset=S5S-1
 7662, 7663, 7664, 7665, 7666, 7667
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** Section: S5S-1
*Shell Section, elset=S5S-1, composite, orientation=Ori-29, layup=S5S
0.125, 3, T800S-24K-UD, 45., Ply-1-Copy2
0.125, 3, T800S-24K-UD, -45., Ply-2-Copy2
0.125, 3, T800S-24K-UD, 45., Ply-1-Copy2-Copy1
0.125, 3, T800S-24K-UD, -45., Ply-2-Copy2-Copy1
0.125, 3, T800S-24K-UD, 45., Ply-1
0.125, 3, T800S-24K-UD, -45., Ply-2
0.125, 3, T800S-24K-UD, 0., Ply-3
0.125, 3, T800S-24K-UD, 90., Ply-4
0.125, 3, T800S-24K-UD, 90., Ply-4-Copy1
0.125, 3, T800S-24K-UD, 0., Ply-3-Copy1
0.125, 3, T800S-24K-UD, -45., Ply-2-Copy1
0.125, 3, T800S-24K-UD, 45., Ply-1-Copy1
*Orientation, name=Ori-28
          0.,           0.,          -1.,          -1.,           0.,           0.
3, 0.
** Region: (S5-1: Generated From Layup)
*Elset, elset=S5-1
  7722,  7723,  7724,  7725,  7726,  7727
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** Section: S5-1
*Shell Section, elset=S5-1, composite, orientation=Ori-28, layup=S5
0.125, 3, T800S-24K-UD, 45., Ply-1
0.125, 3, T800S-24K-UD, -45., Ply-2
0.125, 3, T800S-24K-UD, 0., Ply-3
0.125, 3, T800S-24K-UD, 90., Ply-4
0.125, 3, T800S-24K-UD, 90., Ply-4-Copy1
0.125, 3, T800S-24K-UD, 0., Ply-3-Copy1
0.125, 3, T800S-24K-UD, -45., Ply-2-Copy1
0.125, 3, T800S-24K-UD, 45., Ply-1-Copy1
*Orientation, name=Ori-27
          0.,           0.,          -1.,          -1.,           0.,           0.
3, 0.
** Region: (S4S-1: Generated From Layup)
*Elset, elset=S4S-1
 7866, 7867, 7868, 7869, 7870, 7871
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** Section: S4S-1
*Shell Section, elset=S4S-1, composite, orientation=Ori-27, layup=S4S
0.125, 3, T800S-24K-UD, 45., Ply-1-Copy2
0.125, 3, T800S-24K-UD, -45., Ply-2-Copy2
0.125, 3, T800S-24K-UD, 45., Ply-1-Copy2-Copy1
0.125, 3, T800S-24K-UD, -45., Ply-2-Copy2-Copy1
0.125, 3, T800S-24K-UD, 45., Ply-1
0.125, 3, T800S-24K-UD, -45., Ply-2
0.125, 3, T800S-24K-UD, 0., Ply-3
0.125, 3, T800S-24K-UD, 90., Ply-4
0.125, 3, T800S-24K-UD, 90., Ply-4-Copy1
0.125, 3, T800S-24K-UD, 0., Ply-3-Copy1
0.125, 3, T800S-24K-UD, -45., Ply-2-Copy1
0.125, 3, T800S-24K-UD, 45., Ply-1-Copy1
*Orientation, name=Ori-26
          0.,           0.,          -1.,          -1.,           0.,           0.
3, 0.
** Region: (S4-1: Generated From Layup)
*Elset, elset=S4-1
  7906,  7907,  7908,  7909,  7910,  7911
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** Section: S4-1
*Shell Section, elset=S4-1, composite, orientation=Ori-26, layup=S4
0.125, 3, T800S-24K-UD, 45., Ply-1
0.125, 3, T800S-24K-UD, -45., Ply-2
0.125, 3, T800S-24K-UD, 0., Ply-3
0.125, 3, T800S-24K-UD, 90., Ply-4
0.125, 3, T800S-24K-UD, 90., Ply-4-Copy1
0.125, 3, T800S-24K-UD, 0., Ply-3-Copy1
0.125, 3, T800S-24K-UD, -45., Ply-2-Copy1
0.125, 3, T800S-24K-UD, 45., Ply-1-Copy1
*Orientation, name=Ori-25
          0.,           0.,          -1.,          -1.,           0.,           0.
3, 0.
** Region: (S3S-1: Generated From Layup)
*Elset, elset=S3S-1
 8002, 8003, 8004, 8005, 8006, 8007
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** Section: S3S-1
*Shell Section, elset=S3S-1, composite, orientation=Ori-25, layup=S3S
0.125, 3, T800S-24K-UD, 45., Ply-1-Copy2
0.125, 3, T800S-24K-UD, -45., Ply-2-Copy2
0.125, 3, T800S-24K-UD, 45., Ply-1-Copy2-Copy1
0.125, 3, T800S-24K-UD, -45., Ply-2-Copy2-Copy1
0.125, 3, T800S-24K-UD, 45., Ply-1
0.125, 3, T800S-24K-UD, -45., Ply-2
0.125, 3, T800S-24K-UD, 0., Ply-3
0.125, 3, T800S-24K-UD, 90., Ply-4
0.125, 3, T800S-24K-UD, 90., Ply-4-Copy1
0.125, 3, T800S-24K-UD, 0., Ply-3-Copy1
0.125, 3, T800S-24K-UD, -45., Ply-2-Copy1
0.125, 3, T800S-24K-UD, 45., Ply-1-Copy1
*Orientation, name=Ori-24
          0.,           0.,          -1.,          -1.,           0.,           0.
3, 0.
** Region: (S3-1: Generated From Layup)
*Elset, elset=S3-1
  8042,  8043,  8044,  8045,  8046,  8047
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** Section: S3-1
*Shell Section, elset=S3-1, composite, orientation=Ori-24, layup=S3
0.125, 3, T800S-24K-UD, 45., Ply-1
0.125, 3, T800S-24K-UD, -45., Ply-2
0.125, 3, T800S-24K-UD, 0., Ply-3
0.125, 3, T800S-24K-UD, 90., Ply-4
0.125, 3, T800S-24K-UD, 90., Ply-4-Copy1
0.125, 3, T800S-24K-UD, 0., Ply-3-Copy1
0.125, 3, T800S-24K-UD, -45., Ply-2-Copy1
0.125, 3, T800S-24K-UD, 45., Ply-1-Copy1
*Orientation, name=Ori-23
          0.,           0.,          -1.,          -1.,           0.,           0.
3, 0.
** Region: (S2S-1: Generated From Layup)
*Elset, elset=S2S-1
 8138, 8139, 8140, 8141, 8142, 8143
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** Section: S2S-1
*Shell Section, elset=S2S-1, composite, orientation=Ori-23, layup=S2S
0.125, 3, T800S-24K-UD, 45., Ply-1-Copy2
0.125, 3, T800S-24K-UD, -45., Ply-2-Copy2
0.125, 3, T800S-24K-UD, 45., Ply-1-Copy2-Copy1
0.125, 3, T800S-24K-UD, -45., Ply-2-Copy2-Copy1
0.125, 3, T800S-24K-UD, 45., Ply-1
0.125, 3, T800S-24K-UD, -45., Ply-2
0.125, 3, T800S-24K-UD, 0., Ply-3
0.125, 3, T800S-24K-UD, 90., Ply-4
0.125, 3, T800S-24K-UD, 90., Ply-4-Copy1
0.125, 3, T800S-24K-UD, 0., Ply-3-Copy1
0.125, 3, T800S-24K-UD, -45., Ply-2-Copy1
0.125, 3, T800S-24K-UD, 45., Ply-1-Copy1
*Orientation, name=Ori-22
          0.,           0.,          -1.,          -1.,           0.,           0.
3, 0.
** Region: (S2-1: Generated From Layup)
*Elset, elset=S2-1
  8178,  8179,  8180,  8181,  8182,  8183
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** Section: S2-1
*Shell Section, elset=S2-1, composite, orientation=Ori-22, layup=S2
0.125, 3, T800S-24K-UD, 45., Ply-1
0.125, 3, T800S-24K-UD, -45., Ply-2
0.125, 3, T800S-24K-UD, 0., Ply-3
0.125, 3, T800S-24K-UD, 90., Ply-4
0.125, 3, T800S-24K-UD, 90., Ply-4-Copy1
0.125, 3, T800S-24K-UD, 0., Ply-3-Copy1
0.125, 3, T800S-24K-UD, -45., Ply-2-Copy1
0.125, 3, T800S-24K-UD, 45., Ply-1-Copy1
*Orientation, name=Ori-33
          0.,           0.,          -1.,          -1.,           0.,           0.
3, 0.
** Region: (S7S-1: Generated From Layup)
*Elset, elset=S7S-1
 8926, 8927, 8928, 8929, 8930, 8931
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** Section: S7S-1
*Shell Section, elset=S7S-1, composite, orientation=Ori-33, layup=S7S
0.125, 3, T800S-24K-UD, 45., Ply-1-Copy2
0.125, 3, T800S-24K-UD, -45., Ply-2-Copy2
0.125, 3, T800S-24K-UD, 45., Ply-1-Copy2-Copy1
0.125, 3, T800S-24K-UD, -45., Ply-2-Copy2-Copy1
0.125, 3, T800S-24K-UD, 45., Ply-1
0.125, 3, T800S-24K-UD, -45., Ply-2
0.125, 3, T800S-24K-UD, 0., Ply-3
0.125, 3, T800S-24K-UD, 90., Ply-4
0.125, 3, T800S-24K-UD, 90., Ply-4-Copy1
0.125, 3, T800S-24K-UD, 0., Ply-3-Copy1
0.125, 3, T800S-24K-UD, -45., Ply-2-Copy1
0.125, 3, T800S-24K-UD, 45., Ply-1-Copy1
*Orientation, name=Ori-32
          0.,           0.,          -1.,          -1.,           0.,           0.
3, 0.
** Region: (S7-1: Generated From Layup)
*Elset, elset=S7-1
  8986,  8987,  8988,  8989,  8990,  8991
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** Section: S7-1
*Shell Section, elset=S7-1, composite, orientation=Ori-32, layup=S7
0.125, 3, T800S-24K-UD, 45., Ply-1
0.125, 3, T800S-24K-UD, -45., Ply-2
0.125, 3, T800S-24K-UD, 0., Ply-3
0.125, 3, T800S-24K-UD, 90., Ply-4
0.125, 3, T800S-24K-UD, 90., Ply-4-Copy1
0.125, 3, T800S-24K-UD, 0., Ply-3-Copy1
0.125, 3, T800S-24K-UD, -45., Ply-2-Copy1
0.125, 3, T800S-24K-UD, 45., Ply-1-Copy1
*Orientation, name=Ori-35
          0.,           0.,          -1.,          -1.,           0.,           0.
3, 0.
** Region: (S8S-1: Generated From Layup)
*Elset, elset=S8S-1
 9130, 9131, 9132, 9133, 9134, 9135
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** Section: S8S-1
*Shell Section, elset=S8S-1, composite, orientation=Ori-35, layup=S8S
0.125, 3, T800S-24K-UD, 45., Ply-1-Copy2
0.125, 3, T800S-24K-UD, -45., Ply-2-Copy2
0.125, 3, T800S-24K-UD, 45., Ply-1-Copy2-Copy1
0.125, 3, T800S-24K-UD, -45., Ply-2-Copy2-Copy1
0.125, 3, T800S-24K-UD, 45., Ply-1
0.125, 3, T800S-24K-UD, -45., Ply-2
0.125, 3, T800S-24K-UD, 0., Ply-3
0.125, 3, T800S-24K-UD, 90., Ply-4
0.125, 3, T800S-24K-UD, 90., Ply-4-Copy1
0.125, 3, T800S-24K-UD, 0., Ply-3-Copy1
0.125, 3, T800S-24K-UD, -45., Ply-2-Copy1
0.125, 3, T800S-24K-UD, 45., Ply-1-Copy1
*Orientation, name=Ori-34
          0.,           0.,          -1.,          -1.,           0.,           0.
3, 0.
** Region: (S8-1: Generated From Layup)
*Elset, elset=S8-1
  9190,  9191,  9192,  9193,  9194,  9195
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** Section: S8-1
*Shell Section, elset=S8-1, composite, orientation=Ori-34, layup=S8
0.125, 3, T800S-24K-UD, 45., Ply-1
0.125, 3, T800S-24K-UD, -45., Ply-2
0.125, 3, T800S-24K-UD, 0., Ply-3
0.125, 3, T800S-24K-UD, 90., Ply-4
0.125, 3, T800S-24K-UD, 90., Ply-4-Copy1
0.125, 3, T800S-24K-UD, 0., Ply-3-Copy1
0.125, 3, T800S-24K-UD, -45., Ply-2-Copy1
0.125, 3, T800S-24K-UD, 45., Ply-1-Copy1
*Orientation, name=Ori-17
          0.,           0.,          -1.,          -1.,           0.,           0.
3, 0.
** Region: (LE12-1: Generated From Layup)
*Elset, elset=LE12-1
 10203, 10204, 10205, 10206, 10207, 10208
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** Section: LE12-1
*Shell Section, elset=LE12-1, composite, orientation=Ori-17, layup=LE12
0.125, 3, T800S-24K-UD, 45., Ply-1
0.125, 3, T800S-24K-UD, -45., Ply-2
0.125, 3, T800S-24K-UD, 0., Ply-3
0.125, 3, T800S-24K-UD, 90., Ply-4
0.125, 3, T800S-24K-UD, 90., Ply-4-Copy1
0.125, 3, T800S-24K-UD, 0., Ply-3-Copy1
0.125, 3, T800S-24K-UD, -45., Ply-2-Copy1
0.125, 3, T800S-24K-UD, 45., Ply-1-Copy1
*Orientation, name=Ori-16
          0.,           0.,          -1.,          -1.,           0.,           0.
3, 0.
** Region: (LE11-1: Generated From Layup)
*Elset, elset=LE11-1
 10346, 10347, 10348, 10349, 10350, 10351
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** Section: LE11-1
*Shell Section, elset=LE11-1, composite, orientation=Ori-16, layup=LE11
0.125, 3, T800S-24K-UD, 45., Ply-1
0.125, 3, T800S-24K-UD, -45., Ply-2
0.125, 3, T800S-24K-UD, 0., Ply-3
0.125, 3, T800S-24K-UD, 90., Ply-4
0.125, 3, T800S-24K-UD, 90., Ply-4-Copy1
0.125, 3, T800S-24K-UD, 0., Ply-3-Copy1
0.125, 3, T800S-24K-UD, -45., Ply-2-Copy1
0.125, 3, T800S-24K-UD, 45., Ply-1-Copy1
*Orientation, name=Ori-15
          0.,           0.,          -1.,          -1.,           0.,           0.
3, 0.
** Region: (LE10-1: Generated From Layup)
*Elset, elset=LE10-1
 10502, 10503, 10504, 10505, 10506, 10507
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** Section: LE10-1
*Shell Section, elset=LE10-1, composite, orientation=Ori-15, layup=LE10
0.125, 3, T800S-24K-UD, 45., Ply-1
0.125, 3, T800S-24K-UD, -45., Ply-2
0.125, 3, T800S-24K-UD, 0., Ply-3
0.125, 3, T800S-24K-UD, 90., Ply-4
0.125, 3, T800S-24K-UD, 90., Ply-4-Copy1
0.125, 3, T800S-24K-UD, 0., Ply-3-Copy1
0.125, 3, T800S-24K-UD, -45., Ply-2-Copy1
0.125, 3, T800S-24K-UD, 45., Ply-1-Copy1
*Orientation, name=Ori-14
          0.,           0.,          -1.,          -1.,           0.,           0.
3, 0.
** Region: (LE9-1: Generated From Layup)
*Elset, elset=LE9-1
 10658, 10659, 10660, 10661, 10662, 10663
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** Section: LE9-1
*Shell Section, elset=LE9-1, composite, orientation=Ori-14, layup=LE9
0.125, 3, T800S-24K-UD, 45., Ply-1
0.125, 3, T800S-24K-UD, -45., Ply-2
0.125, 3, T800S-24K-UD, 0., Ply-3
0.125, 3, T800S-24K-UD, 90., Ply-4
0.125, 3, T800S-24K-UD, 90., Ply-4-Copy1
0.125, 3, T800S-24K-UD, 0., Ply-3-Copy1
0.125, 3, T800S-24K-UD, -45., Ply-2-Copy1
0.125, 3, T800S-24K-UD, 45., Ply-1-Copy1
*Orientation, name=Ori-13
          0.,           0.,          -1.,          -1.,           0.,           0.
3, 0.
** Region: (LE8-1: Generated From Layup)
*Elset, elset=LE8-1
 10814, 10815, 10816, 10817, 10818, 10819
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** Section: LE8-1
*Shell Section, elset=LE8-1, composite, orientation=Ori-13, layup=LE8
0.125, 3, T800S-24K-UD, 45., Ply-1
0.125, 3, T800S-24K-UD, -45., Ply-2
0.125, 3, T800S-24K-UD, 0., Ply-3
0.125, 3, T800S-24K-UD, 90., Ply-4
0.125, 3, T800S-24K-UD, 90., Ply-4-Copy1
0.125, 3, T800S-24K-UD, 0., Ply-3-Copy1
0.125, 3, T800S-24K-UD, -45., Ply-2-Copy1
0.125, 3, T800S-24K-UD, 45., Ply-1-Copy1
*Orientation, name=Ori-12
          0.,           0.,          -1.,          -1.,           0.,           0.
3, 0.
** Region: (LE7-1: Generated From Layup)
*Elset, elset=LE7-1
 10970, 10971, 10972, 10973, 10974, 10975
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** Section: LE7-1
*Shell Section, elset=LE7-1, composite, orientation=Ori-12, layup=LE7
0.125, 3, T800S-24K-UD, 45., Ply-1
0.125, 3, T800S-24K-UD, -45., Ply-2
0.125, 3, T800S-24K-UD, 0., Ply-3
0.125, 3, T800S-24K-UD, 90., Ply-4
0.125, 3, T800S-24K-UD, 90., Ply-4-Copy1
0.125, 3, T800S-24K-UD, 0., Ply-3-Copy1
0.125, 3, T800S-24K-UD, -45., Ply-2-Copy1
0.125, 3, T800S-24K-UD, 45., Ply-1-Copy1
*Orientation, name=Ori-11
          0.,           0.,          -1.,          -1.,           0.,           0.
3, 0.
** Region: (LE6-1: Generated From Layup)
*Elset, elset=LE6-1
 11126, 11127, 11128, 11129, 11130, 11131
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** Section: LE6-1
*Shell Section, elset=LE6-1, composite, orientation=Ori-11, layup=LE6
0.125, 3, T800S-24K-UD, 45., Ply-1
0.125, 3, T800S-24K-UD, -45., Ply-2
0.125, 3, T800S-24K-UD, 0., Ply-3
0.125, 3, T800S-24K-UD, 90., Ply-4
0.125, 3, T800S-24K-UD, 90., Ply-4-Copy1
0.125, 3, T800S-24K-UD, 0., Ply-3-Copy1
0.125, 3, T800S-24K-UD, -45., Ply-2-Copy1
0.125, 3, T800S-24K-UD, 45., Ply-1-Copy1
*Orientation, name=Ori-10
          0.,           0.,          -1.,          -1.,           0.,           0.
3, 0.
** Region: (LE5-1: Generated From Layup)
*Elset, elset=LE5-1
 11295, 11296, 11297, 11298, 11299, 11300
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** Section: LE5-1
*Shell Section, elset=LE5-1, composite, orientation=Ori-10, layup=LE5
0.125, 3, T800S-24K-UD, 45., Ply-1
0.125, 3, T800S-24K-UD, -45., Ply-2
0.125, 3, T800S-24K-UD, 0., Ply-3
0.125, 3, T800S-24K-UD, 90., Ply-4
0.125, 3, T800S-24K-UD, 90., Ply-4-Copy1
0.125, 3, T800S-24K-UD, 0., Ply-3-Copy1
0.125, 3, T800S-24K-UD, -45., Ply-2-Copy1
0.125, 3, T800S-24K-UD, 45., Ply-1-Copy1
*Orientation, name=Ori-9
          0.,           0.,          -1.,          -1.,           0.,           0.
3, 0.
** Region: (LE4-1: Generated From Layup)
*Elset, elset=LE4-1
 11451, 11452, 11453, 11454, 11455, 11456
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** Section: LE4-1
*Shell Section, elset=LE4-1, composite, orientation=Ori-9, layup=LE4
0.125, 3, T800S-24K-UD, 45., Ply-1
0.125, 3, T800S-24K-UD, -45., Ply-2
0.125, 3, T800S-24K-UD, 0., Ply-3
0.125, 3, T800S-24K-UD, 90., Ply-4
0.125, 3, T800S-24K-UD, 90., Ply-4-Copy1
0.125, 3, T800S-24K-UD, 0., Ply-3-Copy1
0.125, 3, T800S-24K-UD, -45., Ply-2-Copy1
0.125, 3, T800S-24K-UD, 45., Ply-1-Copy1
*Orientation, name=Ori-8
          0.,           0.,          -1.,          -1.,           0.,           0.
3, 0.
** Region: (LE3-1: Generated From Layup)
*Elset, elset=LE3-1
 11555, 11556, 11557, 11558, 11559, 11560
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** Section: LE3-1
*Shell Section, elset=LE3-1, composite, orientation=Ori-8, layup=LE3
0.125, 3, T800S-24K-UD, 45., Ply-1
0.125, 3, T800S-24K-UD, -45., Ply-2
0.125, 3, T800S-24K-UD, 0., Ply-3
0.125, 3, T800S-24K-UD, 90., Ply-4
0.125, 3, T800S-24K-UD, 90., Ply-4-Copy1
0.125, 3, T800S-24K-UD, 0., Ply-3-Copy1
0.125, 3, T800S-24K-UD, -45., Ply-2-Copy1
0.125, 3, T800S-24K-UD, 45., Ply-1-Copy1
*Orientation, name=Ori-7
          0.,           0.,          -1.,          -1.,           0.,           0.
3, 0.
** Region: (LE2-1: Generated From Layup)
*Elset, elset=LE2-1, generate
 11659,  11858,      1
** Section: LE2-1
*Shell Section, elset=LE2-1, composite, orientation=Ori-7, layup=LE2
0.125, 3, T800S-24K-UD, 45., Ply-1
0.125, 3, T800S-24K-UD, -45., Ply-2
0.125, 3, T800S-24K-UD, 0., Ply-3
0.125, 3, T800S-24K-UD, 90., Ply-4
0.125, 3, T800S-24K-UD, 90., Ply-4-Copy1
0.125, 3, T800S-24K-UD, 0., Ply-3-Copy1
0.125, 3, T800S-24K-UD, -45., Ply-2-Copy1
0.125, 3, T800S-24K-UD, 45., Ply-1-Copy1
*End Part
**
**
** ASSEMBLY
**
*Assembly, name=Assembly
**
*Instance, name=wing#5_stiffeners_STEP-1, part=wing#5_stiffeners
*End Instance
**
*Node
      1,   943.442932, 0.000902483414,    -1506.875
*Node
      2,   666.612183, 0.000638501253,    -3300.625
*Nset, nset="ROOT RIB", instance=wing#5_stiffeners_STEP-1
   415,   416,   418,   421,   442,   445
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*Elset, elset="ROOT RIB", instance=wing#5_stiffeners_STEP-1
  3503,  3504,  3505,  3506,  3507,  3508
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*Nset, nset="SPAR DISP", instance=wing#5_stiffeners_STEP-1
 704,
*Nset, nset="WING MASS", instance=wing#5_stiffeners_STEP-1
     1,     2,     3,     4,     5,     6
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*Nset, nset="WING MASS"
 1, 2
*Elset, elset="WING MASS", instance=wing#5_stiffeners_STEP-1
     1,     2,     3,     4,     5,     6
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*Nset, nset=_PickedSet131, internal, instance=wing#5_stiffeners_STEP-1
  654,  655,  663,  664,  692,  693,  699,  700, 3539, 3540, 3577, 3578, 3704, 3705, 3718, 3719
*Elset, elset=_PickedSet131, internal, instance=wing#5_stiffeners_STEP-1
 3060, 3061, 3062, 3153, 3154, 3155
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*Nset, nset=_PickedSet132, internal
 1, 2
*Nset, nset=_PickedSet134, internal
 1, 2
*Nset, nset=_PickedSet136, internal, instance=wing#5_stiffeners_STEP-1
  584,  585,  588,  590,  592,  595
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*Elset, elset=_PickedSet136, internal, instance=wing#5_stiffeners_STEP-1
 1797, 1798, 1802, 1804, 1806, 1808
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*Elset, elset="_LOWER SURFACE_SPOS", internal, instance=wing#5_stiffeners_STEP-1
  3785,  3786,  3787,  3788,  3789,  3790
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*Surface, type=ELEMENT, name="LOWER SURFACE"
"_LOWER SURFACE_SPOS", SPOS
*Surface, type=NODE, name=_PickedSet131_CNS_, internal
_PickedSet131, 1.
** Constraint: Aileron Coupling
*Coupling, constraint name="Aileron Coupling", ref node=_PickedSet132, surface=_PickedSet131_CNS_, influence radius=250.
*Distributing, weighting method=UNIFORM
*End Assembly
**
** MATERIALS
**
*Material, name=Aluminum
*Elastic
70000., 0.33
*Material, name=CCF800/AC531
*Damage Initiation, criterion=HASHIN
2208.,1052.,  80., 199., 131., 131.
*Density
 1.6e-09,
*Elastic, type=LAMINA
163800.,8630., 0.31,4120.,4120.,4120.
*Fail Stress
2209.,1052.,  70., 199., 131.,   0.,   0.
*Material, name=ECA-R_4p8-29
*Density
 2.9e-11,
*Elastic, type=ENGINEERING CONSTANTS
 72.5,    7.1,  129.5, 0.2606,  0.224, 0.0219,    0.9,   23.9
   14.1,
*Material, name=HRH-10-4p8-48
*Density
 4.8e-11,
*Elastic, type=ENGINEERING CONSTANTS
45., 23.,138., 0.3, 0.1, 0.1, 0.4, 0.4
 0.4,
*Material, name="Mycell M80 (Airex)"
*Density
 8e-11,
*Elastic
53., 0.1
*Material, name=T800H-6K-PW
*Density
 1.51e-09,
*Elastic, type=LAMINA
67.,  67., 0.31,  3.6, 2.88, 2.88
*Fail Stress
1034., 668., 924., 603., 79.3,   0.,   0.
*Material, name=T800S-24K-UD
*Density
 1.54e-09,
*Elastic, type=LAMINA
139.,  9.3, 0.31, 3.94, 3.15, 3.15
*Fail Stress
3006.,1779., 60.8, 216., 68.9,   0.,   0.
*Material, name=Titanium
*Density
 4.94e-09,
*Elastic
450000., 0.185
**
** BOUNDARY CONDITIONS
**
** Name: Fixed Type: Symmetry/Antisymmetry/Encastre
*Boundary
_PickedSet136, ENCASTRE
** ----------------------------------------------------------------
**
** STEP: Step-1
**
*Step, name=Step-1, nlgeom=NO, inc=1000
*Static
0.1, 1., 1e-22, 0.1
**
** LOADS
**
** Name: Aileron Force   Type: Concentrated force
*Cload
_PickedSet134, 1, 0.
_PickedSet134, 2, 22005.8
** Name: Pressure   Type: Pressure Using Field: pressureField
*Dload
wing#5_stiffeners_STEP-1.3785, P, 0.000484849
wing#5_stiffeners_STEP-1.3786, P, 0.00051906
wing#5_stiffeners_STEP-1.3787, P, 0.000545736
wing#5_stiffeners_STEP-1.3788, P, 0.000570652
wing#5_stiffeners_STEP-1.3789, P, 0.000592631
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wing#5_stiffeners_STEP-1.9273, P, -0.0121985
**
** OUTPUT REQUESTS
**
*Restart, write, frequency=0
**
** FIELD OUTPUT: WHOLE WING GEN
**
*Output, field
*Node Output
U,
*Element Output, directions=YES
P, S
**
** FIELD OUTPUT: C11
**
*Element Output, elset=wing#5_stiffeners_STEP-1.C1-1, directions=YES
2, 5, 8, 11, 14, 17, 20, 23, 26, 29, 32, 35, 38, 41, 44, 47
CFAILURE, DAMAGEFC, DAMAGEFT, DAMAGEMC, DAMAGEMT, DMICRT
**
** FIELD OUTPUT: C21
**
*Element Output, elset=wing#5_stiffeners_STEP-1.C2-1, directions=YES
2, 5, 8, 11, 14, 17, 20, 23, 26, 29, 32, 35, 38, 41, 44, 47
CFAILURE, DAMAGEFC, DAMAGEFT, DAMAGEMC, DAMAGEMT, DMICRT
**
** FIELD OUTPUT: LE1
**
*Element Output, elset=wing#5_stiffeners_STEP-1.LE1-1, directions=YES
2, 5, 8, 11, 14, 17, 20, 23
CFAILURE, DAMAGEFC, DAMAGEFT, DAMAGEMC, DAMAGEMT, DMICRT
**
** FIELD OUTPUT: LE10
**
*Element Output, elset=wing#5_stiffeners_STEP-1.LE10-1, directions=YES
2, 5, 8, 11, 14, 17, 20, 23
CFAILURE, DAMAGEFC, DAMAGEFT, DAMAGEMC, DAMAGEMT, DMICRT
**
** FIELD OUTPUT: LE11
**
*Element Output, elset=wing#5_stiffeners_STEP-1.LE11-1, directions=YES
2, 5, 8, 11, 14, 17, 20, 23
CFAILURE, DAMAGEFC, DAMAGEFT, DAMAGEMC, DAMAGEMT, DMICRT
**
** FIELD OUTPUT: LE12
**
*Element Output, elset=wing#5_stiffeners_STEP-1.LE12-1, directions=YES
2, 5, 8, 11, 14, 17, 20, 23
CFAILURE, DAMAGEFC, DAMAGEFT, DAMAGEMC, DAMAGEMT, DMICRT
**
** FIELD OUTPUT: LE2
**
*Element Output, elset=wing#5_stiffeners_STEP-1.LE2-1, directions=YES
2, 5, 8, 11, 14, 17, 20, 23
CFAILURE, DAMAGEFC, DAMAGEFT, DAMAGEMC, DAMAGEMT, DMICRT
**
** FIELD OUTPUT: LE3
**
*Element Output, elset=wing#5_stiffeners_STEP-1.LE3-1, directions=YES
2, 5, 8, 11, 14, 17, 20, 23
CFAILURE, DAMAGEFC, DAMAGEFT, DAMAGEMC, DAMAGEMT, DMICRT
**
** FIELD OUTPUT: LE4
**
*Element Output, elset=wing#5_stiffeners_STEP-1.LE4-1, directions=YES
2, 5, 8, 11, 14, 17, 20, 23
CFAILURE, DAMAGEFC, DAMAGEFT, DAMAGEMC, DAMAGEMT, DMICRT
**
** FIELD OUTPUT: LE5
**
*Element Output, elset=wing#5_stiffeners_STEP-1.LE5-1, directions=YES
2, 5, 8, 11, 14, 17, 20, 23
CFAILURE, DAMAGEFC, DAMAGEFT, DAMAGEMC, DAMAGEMT, DMICRT
**
** FIELD OUTPUT: LE6
**
*Element Output, elset=wing#5_stiffeners_STEP-1.LE6-1, directions=YES
2, 5, 8, 11, 14, 17, 20, 23
CFAILURE, DAMAGEFC, DAMAGEFT, DAMAGEMC, DAMAGEMT, DMICRT
**
** FIELD OUTPUT: LE7
**
*Element Output, elset=wing#5_stiffeners_STEP-1.LE7-1, directions=YES
2, 5, 8, 11, 14, 17, 20, 23
CFAILURE, DAMAGEFC, DAMAGEFT, DAMAGEMC, DAMAGEMT, DMICRT
**
** FIELD OUTPUT: LE8
**
*Element Output, elset=wing#5_stiffeners_STEP-1.LE8-1, directions=YES
2, 5, 8, 11, 14, 17, 20, 23
CFAILURE, DAMAGEFC, DAMAGEFT, DAMAGEMC, DAMAGEMT, DMICRT
**
** FIELD OUTPUT: LE9
**
*Element Output, elset=wing#5_stiffeners_STEP-1.LE9-1, directions=YES
2, 5, 8, 11, 14, 17, 20, 23
CFAILURE, DAMAGEFC, DAMAGEFT, DAMAGEMC, DAMAGEMT, DMICRT
**
** FIELD OUTPUT: R
**
*Element Output, elset=wing#5_stiffeners_STEP-1.R-1, directions=YES
2, 5, 8, 11, 14
CFAILURE, DAMAGEFC, DAMAGEFT, DAMAGEMC, DAMAGEMT, DMICRT
**
** FIELD OUTPUT: S1
**
*Element Output, elset=wing#5_stiffeners_STEP-1.S1-1, directions=YES
2, 5, 8, 11, 14, 17, 20, 23
CFAILURE, DAMAGEFC, DAMAGEFT, DAMAGEMC, DAMAGEMT, DMICRT
**
** FIELD OUTPUT: S10
**
*Element Output, elset=wing#5_stiffeners_STEP-1.S10-1, directions=YES
2, 5, 8, 11, 14, 17, 20, 23
CFAILURE, DAMAGEFC, DAMAGEFT, DAMAGEMC, DAMAGEMT, DMICRT
**
** FIELD OUTPUT: S10S
**
*Element Output, elset=wing#5_stiffeners_STEP-1.S10S-1, directions=YES
2, 5, 8, 11, 14, 17, 20, 23, 26, 29, 32, 35
CFAILURE, DAMAGEFC, DAMAGEFT, DAMAGEMC, DAMAGEMT, DMICRT
**
** FIELD OUTPUT: S11
**
*Element Output, elset=wing#5_stiffeners_STEP-1.S11-1, directions=YES
2, 5, 8, 11, 14, 17, 20, 23
CFAILURE, DAMAGEFC, DAMAGEFT, DAMAGEMC, DAMAGEMT, DMICRT
**
** FIELD OUTPUT: S11S
**
*Element Output, elset=wing#5_stiffeners_STEP-1.S11S-1, directions=YES
2, 5, 8, 11, 14, 17, 20, 23, 26, 29, 32, 35
CFAILURE, DAMAGEFC, DAMAGEFT, DAMAGEMC, DAMAGEMT, DMICRT
**
** FIELD OUTPUT: S12
**
*Element Output, elset=wing#5_stiffeners_STEP-1.S12-1, directions=YES
2, 5, 8, 11, 14, 17, 20, 23
CFAILURE, DAMAGEFC, DAMAGEFT, DAMAGEMC, DAMAGEMT, DMICRT
**
** FIELD OUTPUT: S12S
**
*Element Output, elset=wing#5_stiffeners_STEP-1.S12S-1, directions=YES
2, 5, 8, 11, 14, 17, 20, 23, 26, 29, 32, 35
CFAILURE, DAMAGEFC, DAMAGEFT, DAMAGEMC, DAMAGEMT, DMICRT
**
** FIELD OUTPUT: S1S
**
*Element Output, elset=wing#5_stiffeners_STEP-1.S1S-1, directions=YES
2, 5, 8, 11, 14, 17, 20, 23, 26, 29, 32, 35
CFAILURE, DAMAGEFC, DAMAGEFT, DAMAGEMC, DAMAGEMT, DMICRT
**
** FIELD OUTPUT: S2
**
*Element Output, elset=wing#5_stiffeners_STEP-1.S2-1, directions=YES
2, 5, 8, 11, 14, 17, 20, 23
CFAILURE, DAMAGEFC, DAMAGEFT, DAMAGEMC, DAMAGEMT, DMICRT
**
** FIELD OUTPUT: S2S
**
*Element Output, elset=wing#5_stiffeners_STEP-1.S2S-1, directions=YES
2, 5, 8, 11, 14, 17, 20, 23, 26, 29, 32, 35
CFAILURE, DAMAGEFC, DAMAGEFT, DAMAGEMC, DAMAGEMT, DMICRT
**
** FIELD OUTPUT: S3
**
*Element Output, elset=wing#5_stiffeners_STEP-1.S3-1, directions=YES
2, 5, 8, 11, 14, 17, 20, 23
CFAILURE, DAMAGEFC, DAMAGEFT, DAMAGEMC, DAMAGEMT, DMICRT
**
** FIELD OUTPUT: S3S
**
*Element Output, elset=wing#5_stiffeners_STEP-1.S3S-1, directions=YES
2, 5, 8, 11, 14, 17, 20, 23, 26, 29, 32, 35
CFAILURE, DAMAGEFC, DAMAGEFT, DAMAGEMC, DAMAGEMT, DMICRT
**
** FIELD OUTPUT: S4
**
*Element Output, elset=wing#5_stiffeners_STEP-1.S4-1, directions=YES
2, 5, 8, 11, 14, 17, 20, 23
CFAILURE, DAMAGEFC, DAMAGEFT, DAMAGEMC, DAMAGEMT, DMICRT
**
** FIELD OUTPUT: S4S
**
*Element Output, elset=wing#5_stiffeners_STEP-1.S4S-1, directions=YES
2, 5, 8, 11, 14, 17, 20, 23, 26, 29, 32, 35
CFAILURE, DAMAGEFC, DAMAGEFT, DAMAGEMC, DAMAGEMT, DMICRT
**
** FIELD OUTPUT: S5
**
*Element Output, elset=wing#5_stiffeners_STEP-1.S5-1, directions=YES
2, 5, 8, 11, 14, 17, 20, 23
CFAILURE, DAMAGEFC, DAMAGEFT, DAMAGEMC, DAMAGEMT, DMICRT
**
** FIELD OUTPUT: S5S
**
*Element Output, elset=wing#5_stiffeners_STEP-1.S5S-1, directions=YES
2, 5, 8, 11, 14, 17, 20, 23, 26, 29, 32, 35
CFAILURE, DAMAGEFC, DAMAGEFT, DAMAGEMC, DAMAGEMT, DMICRT
**
** FIELD OUTPUT: S6
**
*Element Output, elset=wing#5_stiffeners_STEP-1.S6-1, directions=YES
2, 5, 8, 11, 14, 17, 20, 23
CFAILURE, DAMAGEFC, DAMAGEFT, DAMAGEMC, DAMAGEMT, DMICRT
**
** FIELD OUTPUT: S6S
**
*Element Output, elset=wing#5_stiffeners_STEP-1.S6S-1, directions=YES
2, 5, 8, 11, 14, 17, 20, 23, 26, 29, 32, 35
CFAILURE, DAMAGEFC, DAMAGEFT, DAMAGEMC, DAMAGEMT, DMICRT
**
** FIELD OUTPUT: S7
**
*Element Output, elset=wing#5_stiffeners_STEP-1.S7-1, directions=YES
2, 5, 8, 11, 14, 17, 20, 23
CFAILURE, DAMAGEFC, DAMAGEFT, DAMAGEMC, DAMAGEMT, DMICRT
**
** FIELD OUTPUT: S7S
**
*Element Output, elset=wing#5_stiffeners_STEP-1.S7S-1, directions=YES
2, 5, 8, 11, 14, 17, 20, 23, 26, 29, 32, 35
CFAILURE, DAMAGEFC, DAMAGEFT, DAMAGEMC, DAMAGEMT, DMICRT
**
** FIELD OUTPUT: S8
**
*Element Output, elset=wing#5_stiffeners_STEP-1.S8-1, directions=YES
2, 5, 8, 11, 14, 17, 20, 23
CFAILURE, DAMAGEFC, DAMAGEFT, DAMAGEMC, DAMAGEMT, DMICRT
**
** FIELD OUTPUT: S8S
**
*Element Output, elset=wing#5_stiffeners_STEP-1.S8S-1, directions=YES
2, 5, 8, 11, 14, 17, 20, 23, 26, 29, 32, 35
CFAILURE, DAMAGEFC, DAMAGEFT, DAMAGEMC, DAMAGEMT, DMICRT
**
** FIELD OUTPUT: S9
**
*Element Output, elset=wing#5_stiffeners_STEP-1.S9-1, directions=YES
2, 5, 8, 11, 14, 17, 20, 23
CFAILURE, DAMAGEFC, DAMAGEFT, DAMAGEMC, DAMAGEMT, DMICRT
**
** FIELD OUTPUT: S9S
**
*Element Output, elset=wing#5_stiffeners_STEP-1.S9S-1, directions=YES
2, 5, 8, 11, 14, 17, 20, 23, 26, 29, 32, 35
CFAILURE, DAMAGEFC, DAMAGEFT, DAMAGEMC, DAMAGEMT, DMICRT
**
** FIELD OUTPUT: STE
**
*Element Output, elset=wing#5_stiffeners_STEP-1.STE-1, directions=YES
2, 5, 8, 11
CFAILURE, DAMAGEFC, DAMAGEFT, DAMAGEMC, DAMAGEMT, DMICRT
**
** FIELD OUTPUT: TE1
**
*Element Output, elset=wing#5_stiffeners_STEP-1.TE1-1, directions=YES
2, 5, 8, 11, 14, 17, 20, 23
CFAILURE, DAMAGEFC, DAMAGEFT, DAMAGEMC, DAMAGEMT, DMICRT
**
** FIELD OUTPUT: TE2
**
*Element Output, elset=wing#5_stiffeners_STEP-1.TE2-1, directions=YES
2, 5, 8, 11, 14, 17, 20, 23
CFAILURE, DAMAGEFC, DAMAGEFT, DAMAGEMC, DAMAGEMT, DMICRT
**
** FIELD OUTPUT: TE3
**
*Element Output, elset=wing#5_stiffeners_STEP-1.TE3-1, directions=YES
2, 5, 8, 11, 14, 17, 20, 23
CFAILURE, DAMAGEFC, DAMAGEFT, DAMAGEMC, DAMAGEMT, DMICRT
**
** FIELD OUTPUT: TE4
**
*Element Output, elset=wing#5_stiffeners_STEP-1.TE4-1, directions=YES
2, 5, 8, 11, 14, 17, 20, 23
CFAILURE, DAMAGEFC, DAMAGEFT, DAMAGEMC, DAMAGEMT, DMICRT
**
** FIELD OUTPUT: W
**
*Element Output, elset=wing#5_stiffeners_STEP-1.W-1, directions=YES
2, 5, 8, 11, 14, 17, 20, 23, 26
CFAILURE, DAMAGEFC, DAMAGEFT, DAMAGEMC, DAMAGEMT, DMICRT
**
** HISTORY OUTPUT: U HISTORY
**
*Output, history
*Element Output
MASS,
*Energy Output
ALLAE, ALLCD, ALLDMD, ALLEE, ALLFD, ALLIE, ALLJD, ALLKE, ALLKL, ALLPD, ALLQB, ALLSD, ALLSE, ALLVD, ALLWK, ETOTAL
*End Step
